# [component: outputs y]
y := sort(y)
transpose(y) = [
    120.991, 128.429, 130.834, 133.143, 133.852, 134.241, 134.377, 135.888, 136.747, 137.579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]
ymin := min(y) = 120.991
ymax := max(y) = 173.96
R := ymax - ymin = 52.969
m := 10
Δ := R/m = 5.2969
j := 1 .. m
k := 1 .. m - 1
x[j - 1] := ymin + Δ*(2*j - 1)/2
x = [123.639; 128.936; 134.233; 139.53; 144.827; 150.124; 155.421; 160.718; 166.015; 171.312]
f := hist(x, y)
transpose(f) = [1, 3, 12, 21, 14, 23, 17, 2, 5]
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a[j - 1] := ymin + Δ*(j - 1)
b[j - 1] := a[j - 1] + Δ
F[k - 1] := sum(f[j], j = 0 .. k - 1)
F[k - 1] = [1; 4; 16; 37; 51; 74; 91; 93; 98]
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m := 20
Δ := R/m = 2.64845
x[j - 1] := ymin + Δ*(2*j - 1)/2
transpose(x) = [122.315, 124.964, 127.612, 130.261, 132.909, 135.557, 138.206, 140.854, 143.503, 146.151]
f := hist(x, y)
transpose(f) = [0, 0, 1, 1, 4, 4, 11, 12, 10]
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a[j - 1] := ymin + Δ*(j - 1)
b[j - 1] := a[j - 1] + Δ
F[k - 1] := sum(f[j], j = 0 .. k - 1)
F[k - 1] = [0; 0; 1; 2; 6; 10; 21; 33; 43]
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