# [area: Вибірка]
# [component: outputs x]
n := 100
# [area: Максимальний і мінімальний елементи вибірки, розмах]
x_min := min(x) = 120.991
x_max := max(x) = 173.96
R_B := x_max - x_min = 52.969
# [area: Вибіркове середнє]
x_avg1 := sum(x[i], i = 0 .. n - 1)/n = 148.819
x_avg2 := mean(x) = 148.819
# [area: Медіана]
x_sort := sort(x)
k := (n/2) - 1 = 49
mediana_1 := (x_sort[k] + x_sort[k + 1])/2 = 149.906
mediana_2 := median(x) = 149.906
# [area: Вибіркова дисперсія і стандартне відхилення]
D := var(x) = 94.2266
s2 := sum((x[i] - x_avg1)^2, i = 0 .. n - 1)/n = 94.2266
σ := sqrt(D) = 9.70704
# [area: Вибіркові моменти 3-го і 4-го порядків]
μ_3 := sum((x[i] - x_avg1)^3, i = 0 .. n - 1)/n = 75.7349
μ_4 := sum((x[i] - x_avg1)^4, i = 0 .. n - 1)/n = 27233.2
# [area: Вибірковий ексцес]
E := (μ_4/D^2) - 3 = 0.067272
# [area: Коефіцієнт асиметрії]
a := μ_3/σ^3 = 0.0828011
# [area: Верхній та нижній квартилі, міжквартильний розмах]
kv_75 := x[74] = 156.72
kv_25 := x[24] = 143.155
R_kv := kv_75 - kv_25 = 13.565
