# [area: Завдання 3.1]
# 1. Прочитати файл, в якому знаходяться дані.
y := READPRN("numbers.txt")
transpose(y) = [
    154.377, 139.478, 154.763, 154.656, 158.742, 155.409, 152.937, 149.142, 150.688, 150.889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]
# 2. Визначити статистику Колмогорова - функцію K(z) та побудувати її графік.
y := sort(y)
y_min := floor(min(y)) = 120  # найбільше ціле число серед всіх чисел, які  <= min(y)
y_max := ceil(max(y)) = 174  # найменше ціле число серед всіх чисел, які >= max(y)
n := 100
h := y_max/n = 1.74
ε := 0.01  # потрібна точність обчислення
i := 0 .. 200
z[i] := -y_max + i*h
transpose(z) = [
    -174, -172.26, -170.52, -168.78, -167.04, -165.3, -163.56, -161.82, -160.08, -158.34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]
# Функція Колмогорова:
K(z) :=
    0 if z ≤ 0
    sum((-1)^k*e^(-2*(k*z)^2), k = -100 .. 100) if z > 0
# міра розходження теоретичної і
# емпіричної функції розподілу
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N(z) := floor(1/z*sqrt(1/2*ln(1/ε))) + 1  # кількість членів у частинній сумі
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# 3. Визначити значення величини α. Розв'язати графічно рівняння 1-K(z)=α.
α(z) := 0.05
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z_α := 1.0
z_α := root((1 - α(z_α)) - K(z_α), z_α) = 1.3581
# 4. Побудувати коридор для теоретичної функції розподілу.
R := y_max - y_min = 54  # розмах вибірки
m := 10  # кількість інтервалів групування
D := R/m = 5.4  # довжина інтервалів групування
j := 0 .. m
x[j] := y_min + D*j  # вектор, який містить межі інтервалів групування
transpose(x) = [120, 125.4, 130.8, 136.2, 141.6, 147, 152.4, 157.8, 163.2, 168.6, 174]
f := hist(x, y)
transpose(f) = [1, 1, 6, 20, 17, 17, 23, 8, 3, 4]
sum(f) = 100
k := 0 .. m - 1
a[j] := y_min + D*j  # вектор, який містить ліві межі інтервалів групування
b[j] := a[j] + D  # вектор, який містить праві межі інтервалів групування
F[k] := 1/n*sum(f[j], j = 0 .. k)  # функція відносних накопичених частот
F_min := F - z_α/sqrt(n)
transpose(F_min) = [-0.12581, -0.11581, -0.0558099, 0.14419, 0.31419, 0.48419, 0.71419, 0.79419, 0.82419, 0.86419]
transpose(F) = [0.01, 0.02, 0.08, 0.28, 0.45, 0.62, 0.85, 0.93, 0.96, 1]
F_max := F + z_α/sqrt(n)
transpose(F_max) = [0.14581, 0.15581, 0.21581, 0.41581, 0.58581, 0.75581, 0.98581, 1.06581, 1.09581, 1.13581]
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# в околі емпіричної функції розподілу побудований коридор, в якому знаходиться теоретична функція розподілу
# [area: Завдання 3.2  n=100]
a := 0
b := 3
α := 0.1
n := 100
f(x) :=
    1/(b - a) if a ≤ x < b
    0 otherwise
x := -1 .. 4
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F(x) :=
    0 if x < a
    (x - a)/(b - a) if a ≤ x < b
    1 if x ≥ b
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M := 1/2*(a + b) = 1.5  # математичне сподівання
Ds := (b - a)^2/12 = 0.75  # дисперсія
σ := sqrt(Ds) = 0.866025  # середнє квадратичне відхилення
Me := (a + b)/2 = 1.5  # медіана
μ_3 := 1/4*sum(a^k*b^(3 - k), k = 1 .. 3) = 0  # момент 3-го порядку
μ_4 := 1/5*sum(a^k*b^(4 - k), k = 1 .. 4) = 0  # момент 4-го порядку
as := 0  # коефіцієнт асиметрії
E := -6/5  # коефіцієнт ексцесу
Y := runif(n, a, b)
transpose(Y) = [
    0.00380526, 0.579969, 1.75502, 1.05092, 2.46851, 0.522387, 2.13149, 0.911958, 0.274234, 0.44194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]
# Вибіркові значення:
M1 := mean(Y) = 1.51779
Me1 := median(Y) = 1.59447
Ds1 := var(Y) = 0.720405
σ1 := sqrt(Ds1) = 0.848767
μ1_3 := sum((Y[i] - M1)^3, i = 0 .. 99)/100 = -0.0881742
μ1_4 := 1*sum((Y[i] - M1)^4, i = 0 .. 99)/100 = 0.955695
E1 := μ1_4/Ds1^2 = 1.84147
as1 := μ1_3/σ^3 = -0.135753
ymin := min(Y) = 0.00380526
ymax := max(Y) = 2.99039
R := ymax - ymin = 2.98658
m := 10
D := R/m = 0.298658
j := 0 .. m
k := 0 .. m - 1
x[j] := ymin + D/2*(2*j + 1)
transpose(x) = [0.153134, 0.451793, 0.750451, 1.04911, 1.34777, 1.64643, 1.94508, 2.24374, 2.5424, 2.84106, 3.13972]
f := hist(x - D/2, Y)
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FT[k] := sum(f[j], j = 0 .. k)
FT := FT/n
# функція накопичених відносних частот
# (теоретична функція розподілу)
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x1 := z_α
F_min := FT - x1/sqrt(n)
F_max := FT + x1/sqrt(n)
transpose(F_min) = [-0.0658099, 0.10419, 0.16419, 0.20419, 0.31419, 0.45419, 0.54419, 0.66419, 0.80419, 0.86419]
transpose(F_max) = [0.20581, 0.37581, 0.43581, 0.47581, 0.58581, 0.72581, 0.81581, 0.93581, 1.07581, 1.13581]
o := 0 .. length(x) - 2
FR[o] := F(x[o])  # функція заданого в умові розподілу
transpose(FR) = [0.0510448, 0.150598, 0.25015, 0.349703, 0.449256, 0.548808, 0.648361, 0.747914, 0.847467, 0.947019]
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# Порівняння теоретичних і вибіркових значень параметрів:
ΔM := |M - M1| = 0.0177884
ΔDs := |Ds - Ds1| = 0.0295946
Δσ := |σ - σ1| = 0.0172584
ΔMe := |Me - Me1| = 0.0944717
Δμ_3 := |μ_3 - μ1_3| = 0.0881742
Δμ_4 := |μ_4 - μ1_4| = 0.955695
Δas := |as - as1| = 0.135753
ΔE := |E - E1| = 3.04147
# [area: Завдання 3.2  n=150]
a := 0
b := 3
α := 0.1
n := 150
f(x) :=
    1/(b - a) if a ≤ x < b
    0 otherwise
x := -1 .. 4
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F(x) :=
    0 if x < a
    (x - a)/(b - a) if a ≤ x < b
    1 if x ≥ b
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M := 1/2*(a + b) = 1.5  # математичне сподівання
Ds := (b - a)^2/12 = 0.75  # дисперсія
σ := sqrt(Ds) = 0.866025  # середнє квадратичне відхилення
Me := (a + b)/2 = 1.5  # медіана
μ_3 := 1/4*sum(a^k*b^(3 - k), k = 1 .. 3) = 0  # момент 3-го порядку
μ_4 := 1/5*sum(a^k*b^(4 - k), k = 1 .. 4) = 0  # момент 4-го порядку
as := 0  # коефіцієнт асиметрії
E := -6/5  # коефіцієнт ексцесу
Y := runif(n, a, b)
transpose(Y) = [
    1.31005, 1.7336, 1.886, 1.51245, 2.0873, 0.569855, 0.535125, 1.37238, 0.292568, 0.283213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]
# Вибіркові значення:
M1 := mean(Y) = 1.39338
Me1 := median(Y) = 1.4869
Ds1 := var(Y) = 0.738476
σ1 := sqrt(Ds1) = 0.859346
μ1_3 := sum((Y[i] - M1)^3, i = 0 .. 99)/100 = 0.0631709
μ1_4 := 1*sum((Y[i] - M1)^4, i = 0 .. 99)/100 = 0.820172
E1 := μ1_4/Ds1^2 = 1.50395
as1 := μ1_3/σ^3 = 0.097258
ymin := min(Y) = 0.0113297
ymax := max(Y) = 2.94531
R := ymax - ymin = 2.93398
m := 10
D := R/m = 0.293398
j := 0 .. m
k := 0 .. m - 1
x[j] := ymin + D/2*(2*j + 1)
transpose(x) = [0.158029, 0.451426, 0.744824, 1.03822, 1.33162, 1.62502, 1.91842, 2.21181, 2.50521, 2.79861, 3.09201]
f := hist(x - D/2, Y)
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FT[k] := sum(f[j], j = 0 .. k)
FT := FT/n
# функція накопичених відносних частот
# (теоретична функція розподілу)
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x1 := z_α
F_min := FT - x1/sqrt(n)
F_max := FT + x1/sqrt(n)
transpose(F_min) = [0.022445, 0.142445, 0.235778, 0.309112, 0.382445, 0.522445, 0.629112, 0.715778, 0.795778, 0.889112]
transpose(F_max) = [0.244222, 0.364222, 0.457555, 0.530888, 0.604222, 0.744222, 0.850888, 0.937555, 1.01755, 1.11089]
o := 0 .. length(x) - 2
FR[o] := F(x[o])  # функція заданого в умові розподілу
transpose(FR) = [0.0526762, 0.150475, 0.248275, 0.346074, 0.443873, 0.541673, 0.639472, 0.737271, 0.83507, 0.93287]
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# Порівняння теоретичних і вибіркових значень параметрів:
ΔM := |M - M1| = 0.106621
ΔDs := |Ds - Ds1| = 0.0115243
Δσ := |σ - σ1| = 0.00667929
ΔMe := |Me - Me1| = 0.0130978
Δμ_3 := |μ_3 - μ1_3| = 0.0631709
Δμ_4 := |μ_4 - μ1_4| = 0.820172
Δas := |as - as1| = 0.097258
ΔE := |E - E1| = 2.70395
# [area: Завдання 3.2  n=200]
a := 0
b := 3
α := 0.1
n := 200
f(x) :=
    1/(b - a) if a ≤ x < b
    0 otherwise
x := -1 .. 4
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F(x) :=
    0 if x < a
    (x - a)/(b - a) if a ≤ x < b
    1 if x ≥ b
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M := 1/2*(a + b) = 1.5  # математичне сподівання
Ds := (b - a)^2/12 = 0.75  # дисперсія
σ := sqrt(Ds) = 0.866025  # середнє квадратичне відхилення
Me := (a + b)/2 = 1.5  # медіана
μ_3 := 1/4*sum(a^k*b^(3 - k), k = 1 .. 3) = 0  # момент 3-го порядку
μ_4 := 1/5*sum(a^k*b^(4 - k), k = 1 .. 4) = 0  # момент 4-го порядку
as := 0  # коефіцієнт асиметрії
E := -6/5  # коефіцієнт ексцесу
Y := runif(n, a, b)
transpose(Y) = [
    0.115746, 0.567833, 0.460567, 2.65612, 0.587016, 1.93668, 2.7274, 2.76385, 0.452329, 1.7086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]
# Вибіркові значення:
M1 := mean(Y) = 1.49966
Me1 := median(Y) = 1.66015
Ds1 := var(Y) = 0.721855
σ1 := sqrt(Ds1) = 0.849621
μ1_3 := sum((Y[i] - M1)^3, i = 0 .. 99)/100 = -0.159254
μ1_4 := 1*sum((Y[i] - M1)^4, i = 0 .. 99)/100 = 0.901733
E1 := μ1_4/Ds1^2 = 1.73052
as1 := μ1_3/σ^3 = -0.245188
ymin := min(Y) = 0.00262367
ymax := max(Y) = 2.98802
R := ymax - ymin = 2.98539
m := 10
D := R/m = 0.298539
j := 0 .. m
k := 0 .. m - 1
x[j] := ymin + D/2*(2*j + 1)
transpose(x) = [0.151893, 0.450433, 0.748972, 1.04751, 1.34605, 1.64459, 1.94313, 2.24167, 2.54021, 2.83875, 3.13729]
f := hist(x - D/2, Y)
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FT[k] := sum(f[j], j = 0 .. k)
FT := FT/n
# функція накопичених відносних частот
# (теоретична функція розподілу)
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x1 := z_α
F_min := FT - x1/sqrt(n)
F_max := FT + x1/sqrt(n)
transpose(F_min) = [0.0289679, 0.113968, 0.183968, 0.288968, 0.378968, 0.458968, 0.633968, 0.728968, 0.828968, 0.903968]
transpose(F_max) = [0.221032, 0.306032, 0.376032, 0.481032, 0.571032, 0.651032, 0.826032, 0.921032, 1.02103, 1.09603]
o := 0 .. length(x) - 2
FR[o] := F(x[o])  # функція заданого в умові розподілу
transpose(FR) = [0.0506311, 0.150144, 0.249657, 0.349171, 0.448684, 0.548197, 0.64771, 0.747223, 0.846736, 0.94625]
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# Порівняння теоретичних і вибіркових значень параметрів:
ΔM := |M - M1| = 0.000340972
ΔDs := |Ds - Ds1| = 0.0281445
Δσ := |σ - σ1| = 0.0164046
ΔMe := |Me - Me1| = 0.16015
Δμ_3 := |μ_3 - μ1_3| = 0.159254
Δμ_4 := |μ_4 - μ1_4| = 0.901733
Δas := |as - as1| = 0.245188
ΔE := |E - E1| = 2.93052
# [area: Завдання 3.2  n=300]
a := 0
b := 3
α := 0.1
n := 300
f(x) :=
    1/(b - a) if a ≤ x < b
    0 otherwise
x := -1 .. 4
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F(x) :=
    0 if x < a
    (x - a)/(b - a) if a ≤ x < b
    1 if x ≥ b
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M := 1/2*(a + b) = 1.5  # математичне сподівання
Ds := (b - a)^2/12 = 0.75  # дисперсія
σ := sqrt(Ds) = 0.866025  # середнє квадратичне відхилення
Me := (a + b)/2 = 1.5  # медіана
μ_3 := 1/4*sum(a^k*b^(3 - k), k = 1 .. 3) = 0  # момент 3-го порядку
μ_4 := 1/5*sum(a^k*b^(4 - k), k = 1 .. 4) = 0  # момент 4-го порядку
as := 0  # коефіцієнт асиметрії
E := -6/5  # коефіцієнт ексцесу
Y := runif(n, a, b)
transpose(Y) = [
    2.60832, 0.117409, 2.80829, 0.494587, 0.350793, 0.355098, 1.7403, 2.19469, 2.00915, 2.42655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]
# Вибіркові значення:
M1 := mean(Y) = 1.51509
Me1 := median(Y) = 1.49598
Ds1 := var(Y) = 0.774625
σ1 := sqrt(Ds1) = 0.880128
μ1_3 := sum((Y[i] - M1)^3, i = 0 .. 99)/100 = 0.0124154
μ1_4 := 1*sum((Y[i] - M1)^4, i = 0 .. 99)/100 = 1.1223
E1 := μ1_4/Ds1^2 = 1.87036
as1 := μ1_3/σ^3 = 0.0191148
ymin := min(Y) = 0.00263384
ymax := max(Y) = 2.99798
R := ymax - ymin = 2.99535
m := 10
D := R/m = 0.299535
j := 0 .. m
k := 0 .. m - 1
x[j] := ymin + D/2*(2*j + 1)
transpose(x) = [0.152401, 0.451936, 0.751471, 1.05101, 1.35054, 1.65008, 1.94961, 2.24915, 2.54868, 2.84822, 3.14775]
f := hist(x - D/2, Y)
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FT[k] := sum(f[j], j = 0 .. k)
FT := FT/n
# функція накопичених відносних частот
# (теоретична функція розподілу)
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x1 := z_α
F_min := FT - x1/sqrt(n)
F_max := FT + x1/sqrt(n)
transpose(F_min) = [0.0182568, 0.11159, 0.22159, 0.324923, 0.424923, 0.518257, 0.604923, 0.704923, 0.828257, 0.92159]
transpose(F_max) = [0.175077, 0.26841, 0.37841, 0.481743, 0.581743, 0.675077, 0.761743, 0.861743, 0.985077, 1.07841]
o := 0 .. length(x) - 2
FR[o] := F(x[o])  # функція заданого в умові розподілу
transpose(FR) = [0.0508004, 0.150645, 0.25049, 0.350335, 0.45018, 0.550025, 0.64987, 0.749715, 0.84956, 0.949405]
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# Порівняння теоретичних і вибіркових значень параметрів:
ΔM := |M - M1| = 0.0150894
ΔDs := |Ds - Ds1| = 0.0246254
Δσ := |σ - σ1| = 0.0141027
ΔMe := |Me - Me1| = 0.0040236
Δμ_3 := |μ_3 - μ1_3| = 0.0124154
Δμ_4 := |μ_4 - μ1_4| = 1.1223
Δas := |as - as1| = 0.0191148
ΔE := |E - E1| = 3.07036
# [area: Завдання 3.2  n=500]
a := 0
b := 3
α := 0.1
n := 500
f(x) :=
    1/(b - a) if a ≤ x < b
    0 otherwise
x := -1 .. 4
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F(x) :=
    0 if x < a
    (x - a)/(b - a) if a ≤ x < b
    1 if x ≥ b
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M := 1/2*(a + b) = 1.5  # математичне сподівання
Ds := (b - a)^2/12 = 0.75  # дисперсія
σ := sqrt(Ds) = 0.866025  # середнє квадратичне відхилення
Me := (a + b)/2 = 1.5  # медіана
μ_3 := 1/4*sum(a^k*b^(3 - k), k = 1 .. 3) = 0  # момент 3-го порядку
μ_4 := 1/5*sum(a^k*b^(4 - k), k = 1 .. 4) = 0  # момент 4-го порядку
as := 0  # коефіцієнт асиметрії
E := -6/5  # коефіцієнт ексцесу
Y := runif(n, a, b)
transpose(Y) = [
    1.25579, 2.33021, 0.453571, 0.262053, 1.41546, 0.998298, 1.84352, 0.842178, 1.31726, 0.662852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]
# Вибіркові значення:
M1 := mean(Y) = 1.52842
Me1 := median(Y) = 1.50304
Ds1 := var(Y) = 0.773219
σ1 := sqrt(Ds1) = 0.879329
μ1_3 := sum((Y[i] - M1)^3, i = 0 .. 99)/100 = -0.128163
μ1_4 := 1*sum((Y[i] - M1)^4, i = 0 .. 99)/100 = 1.1371
E1 := μ1_4/Ds1^2 = 1.90192
as1 := μ1_3/σ^3 = -0.197319
ymin := min(Y) = 0.00197268
ymax := max(Y) = 2.99546
R := ymax - ymin = 2.99348
m := 10
D := R/m = 0.299348
j := 0 .. m
k := 0 .. m - 1
x[j] := ymin + D/2*(2*j + 1)
transpose(x) = [0.151647, 0.450995, 0.750344, 1.04969, 1.34904, 1.64839, 1.94774, 2.24709, 2.54643, 2.84578, 3.14513]
f := hist(x - D/2, Y)
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FT[k] := sum(f[j], j = 0 .. k)
FT := FT/n
# функція накопичених відносних частот
# (теоретична функція розподілу)
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x1 := z_α
F_min := FT - x1/sqrt(n)
F_max := FT + x1/sqrt(n)
transpose(F_min) = [0.029264, 0.125264, 0.231264, 0.345264, 0.439264, 0.527264, 0.611264, 0.715264, 0.825264, 0.939264]
transpose(F_max) = [0.150736, 0.246736, 0.352736, 0.466736, 0.560736, 0.648736, 0.732736, 0.836736, 0.946736, 1.06074]
o := 0 .. length(x) - 2
FR[o] := F(x[o])  # функція заданого в умові розподілу
transpose(FR) = [0.050549, 0.150332, 0.250115, 0.349897, 0.44968, 0.549463, 0.649246, 0.749029, 0.848811, 0.948594]
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# Порівняння теоретичних і вибіркових значень параметрів:
ΔM := |M - M1| = 0.0284195
ΔDs := |Ds - Ds1| = 0.0232195
Δσ := |σ - σ1| = 0.0133036
ΔMe := |Me - Me1| = 0.00303973
Δμ_3 := |μ_3 - μ1_3| = 0.128163
Δμ_4 := |μ_4 - μ1_4| = 1.1371
Δas := |as - as1| = 0.197319
ΔE := |E - E1| = 3.10192
