y := READPRN("D:\University\3_Course\Data_analysis\numbers.txt")
transpose(y) = [
    154.377, 139.478, 154.763, 154.656, 158.742, 155.409, 152.937, 149.142, 150.688, 150.889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]
x := sort(y)
n := 100
i := 0 .. 99
μ
# [area: 4.1]
M := 1/n*sum(x[i], i = 0 .. n - 1) = 148.819  # вибіркове середнє - незсунена, конзистенційна оцінка математичного сподівання
D := 1/(n - 1)*sum((x[i] - M)^2, i = 0 .. n - 1) = 95.1784  # конзистенційна, незсунена оцінка дисперсії
# [area: 4.2]
f(n, p) := rbinom(1, n, p)[0]/n
p := 0.4
N := 1000
n := 10, 20 .. N
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# [area: 4.3]
θ := 4/2 = 2
Xrivn(n) := runif(n, 0, θ)
N := 1000
n := 10, 20 .. N
θ1(n) := 2/n*sum(Xrivn(n)[i], i = 0 .. n - 1)
θ3(n) := (n + 1)/n*max(Xrivn(n))
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