# [area: 5.1]
N := 4
λ := 0.1*N = 0.4
m := rpois(100, λ)
transpose(m) = [
    0, 0, 0, 0, 1, 1, 0, 0, 1, 0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]
lnL := ln(λ^sum(m[i], i = 0 .. length(m) - 1)/product(m[i]!, i = 0 .. length(m) - 1)*e^(-length(m)*λ)) = -81.2568
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λmax(n) := 1/n*sum(rpois(n, λ)[i], i = 0 .. n - 1)
s := 50, 100 .. 2000
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# [area: 5.2]
x := rexp(100, λ)
transpose(x) = [
    0.431073, 3.72963, 2.6158, 0.0766453, 2.13967, 1.87869, 6.89728, 2.02082, 6.50369, 1.69328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]
lnL := length(x)*ln(λ) - sum(x[i], i = 0 .. length(x) - 1)*λ = -189.638
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λmax(n) := 1/mean(rexp(n, λ))
s := 50, 100 .. 2000
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# [area: 5.3]
θ1 := 2.5
θ2 := 3
n := 199
rivnom := runif(n, 0, 1)
transpose(rivnom) = [
    0.167503, 0.038491, 0.146395, 0.309145, 0.421633, 0.597376, 0.63556, 0.986178, 0.251699, 0.0896183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]
Frozp(x) :=
    1/2*exp((x - θ1)/θ2) if x < θ1
    1 - 1/2*exp(-((x - θ1)/θ2)) if x ≥ θ1
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Fobern(x) := θ1 - θ2*sign(x - 0.5)*ln(1 - 2*|x - 0.5|)
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i := 0, 1 .. n - 1
laplas[i] := Fobern(rivnom[i])
transpose(laplas) = [
    -0.780826, -5.19255, -1.1849, 1.05761, 1.98858, 3.14981, 3.44874, 13.265, 0.440883, -2.65714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]
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θ1max := median(sort(laplas)) = 2.36227
θ2max := 1/n*sum(|laplas[i] - θ1max|, i = 0 .. n - 1) = 3.27211
