Y := READPRN("D:\University\3_Course\Data_analysis\numbers.txt")
transpose(Y) = [
    154.377, 139.478, 154.763, 154.656, 158.742, 155.409, 152.937, 149.142, 150.688, 150.889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]
n := length(Y)
j := 0 .. n - 1
Mx := 1/n*sum(Y[j], j = 0 .. n - 1) = 148.819
Dx := 1/(n - 1)*sum((Y[j] - Mx)^2, j = 0 .. n - 1) = 95.1784
# 95 % інтервал для мат сподівання
t := qt(1 - 0.05/2, n) = 1.98397
xl := Mx - t*sqrt(Dx/n) = 146.883
xr := Mx + t*sqrt(Dx/n) = 150.754
# 90 % інтервал для Дисперсії
hl := qchisq(0.1/2, n - 1) = 77.0463
hr := qchisq(1 - 0.1/2, n - 1) = 123.225
dl := Dx*(n - 1)/hr = 76.4669
dr := Dx*(n - 1)/hl = 122.299
α := 0.1
λ := 0.4
N := 500
P := rpois(N, λ)
P = [
    0; 0; 0; 0; 1; 1; 0; 0; 1; 0
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]
Pmax := max(P) = 3
Pmin := min(P) = 0
R := Pmax - Pmin = 3
PS := sort(P) = [
    0; 0; 0; 0; 0; 0; 0; 0; 0; 0
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]
m := 9
Δ := R/m = 0.333333
j := 1 .. m
k := 1 .. m - 1
p[j] := Pmin + Δ/2*(2*j - 1)
f := hist(p, PS)
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xα := qnorm(1 - α/2, 0, 1) = 1.64485
n := 10 .. 500
λest(n) := 1/n*sum(P[j], j = 1 .. n)
λest(50) = 0.56
λest(100) = 0.42
λleft(n) := (sqrt(λest(n)) - xα/(2*sqrt(n)))^2
λright(n) := (sqrt(λest(n)) + xα/(2*sqrt(n)))^2
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α = 0.1
n := 80
m := 35
xα := qnorm(1 - α/2, 0, 1) = 1.64485
p := m/n = 0.4375
pleft := sin(asin(sqrt(p)) - xα/(2*sqrt(n)))^2 = 0.347838
# надійний інтервал для параметра p
pright := sin(asin(sqrt(p)) + xα/(2*sqrt(n)))^2 = 0.529269
m(n) := rbinom(10, n, 0.5)[1]
n := 0 .. 50
p(n) := m(n)/n
pleft(n) := sin(asin(sqrt(p(n))) - xα/(2*sqrt(n)))^2
pright(n) := sin(asin(sqrt(p(n))) + xα/(2*sqrt(n)))^2
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α = 0.1
n := 14
i := 0 .. n
xα = 1.64485
XY := [
    1.991, 1.619, -2.023, -0.727, 3.314, 0.147, -0.563, -0.813, 0.894, 1.092, -0.058, 0.266, 0.945, -1.444, -0.169;
    -6.922, 9.229, 15.093, 1.123, -21.609, 9.451, -22.941, 2.193, -12.419, -7.153, -2.961, 0.026, 4.406, 17.23, -2.743
]
XY = [
    1.991, 1.619, -2.023, -0.727, 3.314, 0.147, -0.563, -0.813, 0.894, 1.092, -0.058, 0.266, 0.945, -1.444, -0.169;
    -6.922, 9.229, 15.093, 1.123, -21.609, 9.451, -22.941, 2.193, -12.419, -7.153, -2.961, 0.026, 4.406, 17.23, -2.743
]
Xmean := 1/n*sum(XY[0, i], i = 0 .. n) = 0.319357
Ymean := 1/n*sum(XY[1, i], i = 0 .. n) = -1.2855
m := 1/n*sum((XY[0, i] - Xmean)*(XY[1, i] - Ymean), i = 0 .. n)
m = -8.78075
σ2x := 1/n*sum((XY[0, i] - Xmean)^2, i = 0 .. n)
σ2x = 1.92394
σ2y := 1/n*sum((XY[1, i] - Ymean)^2, i = 0 .. n)
σ2y = 140.429
k := m/sqrt(σ2x*σ2y)
k = -0.534204  # Вибірковий коеф кореляції
kleft := (atanh(k) - xα/sqrt(n - 3))
kleft = -1.09195
kright := (atanh(k) + xα/sqrt(n - 3))
kright = -0.100068
# Точкова оцінка коеф кореляції
k := sum(XY[0, i]*XY[1, i] - 1/n*sum(XY[0, i]*sum(XY[1, i], i = 0 .. n), i = 0 .. n), i = 0 .. n)/sqrt(sum(1/n*sum(XY[0, i], i = 0 .. n)^2, i = 0 .. n)*sum(XY[1, i]^2 - 1/n*sum(XY[1, i], i = 0 .. n)^2, i = 0 .. n))
k = -0.224363
kleft := (atanh(k) - xα/sqrt(n - 3))
kleft = -0.724188
kright := (atanh(k) + xα/sqrt(n - 3))
kright = 0.267696
