α := 0.1
N := 100
a := 2.2
σ := 4
i := 0 .. N - 1
ξ := rnorm(N, a, σ)
ξ = [
    2.0962; 9.23903; -3.82862; 8.79958; 3.05101; -1.82091; 0.880799; 0.0170446; 0.0928548; -3.37788
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]
Mx := 1/N*sum(ξ[i], i = 0 .. N - 1) = 1.94566
Dx := 1/(N - 1)*sum((ξ[i] - Mx)^2, i = 0 .. N - 1) = 16.9498
ξmean := mean(ξ) = 1.94566
# H0
a0 := a
ϕ := (ξmean - a0)/sqrt(σ^2/N)
ϕ = -0.63584
Xmean := mean(ξ) = 1.94566
# H1
a ≠ a0
Xright := qnorm(1 - α/2, 0, 1) = 1.64485
Xleft := -Xright
Xleft = -1.64485
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# У нашому випадку  φ<Xright | тому гіпотеза H0 не відкидається
# H1
a > a0
Xright := qnorm(1 - α, 0, 1) = 1.28155
Xleft := -Xright
Xleft = -1.28155
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# у нашому випадку приймається гіпотеза H0, бо критерій менший за праву частину і більший за ліву частину
S2 := N/(N - 1)*var(ξ)
S2 = 16.9498
ϕ := (ξmean - a0)/sqrt(S2/N)
ϕ = -0.617768
# H1
a ≠ a0
Xright := qt(1 - α/2, 99) = 1.66039
Xleft := -Xright
Xleft = -1.66039
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# У нашому випадку ϕ<Xleft | тому приймається гіпотеза H1
H1
a > a0
ϕ = -0.617768
Xright := qt(1 - α, 99) = 1.29016
Xleft := -Xright
Xleft = -1.29016
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# У нашому випадку | приймається гіпотеза H0
σ0 := 4
ξ := rnorm(N, a, σ0)
ξ = [
    -1.33811; 2.83454; -5.0151; -2.46619; 4.4343; -3.78878; 3.12391; 0.112284; -11.498; -5.40328
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]
ξmean := mean(ξ) = 2.26955
Mx := 1/N*sum(ξ[i], i = 0 .. N - 1)
Dx := 1/(N - 1)*sum((ξ[i] - Mx)^2, i = 0 .. N - 1)
Mx = 2.26955
Dx = 17.3293
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ϕ := (N - 1)*Dx/σ0^2
ϕ = 107.225
Xleft := qchisq(α/2, N - 1) = 77.0463
Xright := qchisq(1 - α/2, N - 1) = 123.225
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# Приймається гіпотеза Н0, бо ϕ попадає в задану границю
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Xright := qchisq(1 - α, N - 1) = 117.407
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# У нашому випадку приймається гіпотеза H0
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Xleft := qchisq(α, N - 1) = 81.4493
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# У нашому випадку приймається гіпотеза H0
