N1 := 100
N2 := 120
a := 2.2
σ := 4
ξ := rnorm(N1, a, σ) = [
    -0.308336; -0.0135118; 0.815937; 0.342023; 3.20378; 0.70657; 1.10741; 7.35813; 2.97633; 10.5458
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]
ξmean := mean(ξ)
ξmean = 1.21811
Mx1 := 1/N1*sum(ξ[i], i = 0 .. N1 - 1)
Mx1 = 1.21811
Dx1 := 1/(N1 - 1)*sum((ξ[i] - Mx1)^2, i = 0 .. N1 - 1)
Dx1 = 14.0577
ζ := rnorm(N2, a, σ)
ζ = [
    2.439; 0.207716; 2.42495; -1.07996; 2.01096; 1.194; 2.27686; 9.34339; 1.9109; 0.322603
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]
ζmean := mean(ζ) = 1.51119
Mx2 := 1/N2*sum(ζ[i], i = 0 .. N2 - 1)
Mx2 = 1.51119
Dx2 := 1/(N2 - 1)*sum((ζ[i] - Mx2)^2, i = 0 .. N2 - 1)
Dx2 = 15.9113
a1 := a
σ1 := σ
a2 := 3.1
σ2 := 4.5
α := 0.05
H0
a1 := a2
H1
a1 ≠ a2
ϕ := (ξmean - ζmean)/sqrt(σ1^2/N1 + σ2^2/N2)
ϕ = -0.511153
Xright := qnorm(1 - α/2, 0, 1)
Xright = 1.95996
Xleft := -Xright
Xleft = -1.95996
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# У цьому випадку приймається гіпотеза H0
α := 0.1
H0
a1 := a2
H1
a1 ≠ a2
ϕ := (Mx1 - Mx2)/sqrt((1/N1 + 1/N2)*((N1 - 1)*Dx1 + (N2 - 1)*Dx2)/(N1 + N2 - 2))
ϕ = -0.557587
xL := qt(α/2, N1 + N2 - 2)
Xleft = -1.95996
xR := qt(1 - α/2, N1 + N2 - 2)
Xright = 1.95996
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# У цьому випадку приймається гіпотеза H0, тому що критерій входить у інтервал
