# [area: Відокремлення коренів]
f(x) := x^6 - 3*x^2 + x - 1
v := [-1; 1; -3; 0; 0; 0; 1]
polyroots(v) = [-1.43052; -0.110287 + 1.2669i; -0.110287 - 1.2669i; 0.177401 - 0.549532i; 0.177401 + 0.549532i; 1.29629]
x := -2, -1.9 .. 2
f(-4) = 4043
f(4) = 4051
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# У заданому рівнянні
n := 6
a_6 := 1
a_5 := 0
a_4 := 0
a_3 := 0
a_2 := -3
a_1 := 1
a_0 := -1
# Застосуємо спочатку аналітичний метод. Згідно з теоремою 2, оскільки n=6, дане рівняння
# має рівно 6 коренів.
# Перевіримо умови теореми 5.
a_5^2 = 0
a_6*a_4 = 0
a_4^2 = 0
a_5*a_3 = 0
a_3^2 = 0
a_4*a_2 = 0
a_2^2 = 9  # >
a_3*a_1 = 0
a_1^2 = 1  # <
a_2*a_0 = 3
# Умова (6) не виконується, отже корені можуть бути як дійсними так і пари
# комплексно спряжених.
#
# Виконується умова (7), тому за наслідком теореми 5 рівняння (4) має принаймні
# одну пару комплексних коренів.
#
# Кількість змін знаків коефіцієнтів многочлена P_6(x) = x^6 - 3x^2 + x - 1
# дорівнює 3, отже, за теоремою 4, кількість дійсних додатних коренів S_1 = 3 або S_1 = 3 - 2 = 1.
#
# Число змін знаків коефіцієнтів многочлена P_6(-x) = x^6 - 3x^2 - x - 1
# дорівнює 1, отже, за теоремою 4, кількість дійсних від'ємних коренів S_2 = 1.
#
# Далі за формулою (5) знайдемо кільце, в якому містяться усі корені вихідного
# рівняння. Для цього знайдемо спочатку  a  і b :
a := max(|a_0|, |a_1|, |a_2|, |a_3|, |a_4|, |a_5|) = 3
b := max(|a_1|, |a_2|, |a_3|, |a_4|, |a_5|, |a_6|) = 3
# Тоді корені рівняння містяться в кільці
|-1|/(|-1| + 3) ≤ |x| ≤ 1 + 3/|1|
# <=>
1/4 ≤ |x| ≤ 4
# Звідси випливає, що від'ємні корені рівняння задовольняють нерівність
-4 ≤ x_i^negative ≤ -1/4
# а додатні – нерівність
1/4 ≤ x_i^positive ≤ 4
# Далі застосуємо табличний метод для відокремлення дійсних коренів.
