# Метод Гаусса
A := [1, 1, 2, 3; 3, -1, -1, -2; 2, 3, -1, -1; 1, 2, 3, -1]
B := [8; 2; 5; 6]
AX := augment(A, B)
AX = [1, 1, 2, 3, 8; 3, -1, -1, -2, 2; 2, 3, -1, -1, 5; 1, 2, 3, -1, 6]
AG := rref(AX)
AG = [1, 0, 0, 0, 2; 0, 1, 0, 0, 1; 0, 0, 1, 0, 1; 0, 0, 0, 1, 1]
x := submatrix(AG, 0, 3, 4, 4)
transpose(x) = [2, 1, 1, 1]
# Матричний метод
A := [1, 1, 2, 3; 3, -1, -1, -2; 2, 3, -1, -1; 1, 2, 3, -1]
B := [8; 2; 5; 6]
x := A^-1*B
x = [2; 1; 1; 1]
# LU метод
A := [1, 1, 2, 3; 3, -1, -1, -2; 2, 3, -1, -1; 1, 2, 3, -1]
B := [8; 2; 5; 6]
m1 := submatrix(A, 0, 0, 0, 0) = [1]
Δ1 := |m1| = 1
m2 := submatrix(A, 0, 1, 0, 1) = [1, 1; 3, -1]
Δ2 := |m2| = -4
m3 := submatrix(A, 0, 2, 0, 2) = [1, 1, 2; 3, -1, -1; 2, 3, -1]
Δ3 := |m3| = 27
Δ4 := |A| = -153
ε := 0.001
A_sub_ε := A - ε = [
    0.999, 0.999, 1.999, 2.999;
    2.999, -1.001, -1.001, -2.001;
    1.999, 2.999, -1.001, -1.001;
    0.999, 1.999, 2.999, -1.001
]
A_sub_ε_inverse := (A - ε)^-1 = [
    0.176674, 0.254929, 0.0392776, -0.0195636;
    -0.0195636, -0.176465, 0.254915, 0.0392253;
    0.0392776, 0.0196159, -0.176452, 0.254915;
    0.254929, -0.0392122, 0.0196159, -0.176465
]
A2 := A_sub_ε_inverse*A = [
    1.00045, 0.000451317, 0.000451317, 0.000451317;
    9.81123e-5, 1.0001, 9.81123e-5, 9.81123e-5;
    0.000137357, 0.000137357, 1.00014, 0.000137357;
    5.88674e-5, 5.88674e-5, 5.88674e-5, 1.00006
]
B2 := A_sub_ε_inverse*B = [2.00226; 1.00049; 1.00069; 1.00029]
A3 := A2*50962 = [50985, 23, 23, 23; 5, 50967, 5, 5; 7, 7, 50969, 7; 3, 3, 3, 50965]
B3 := B2*50962 = [102039; 50987; 50997; 50977]
Arow1 := submatrix(A3, 0, 0, 0, 3)/50985 = [1, 0.000451113, 0.000451113, 0.000451113]
Brow1 := submatrix(B3, 0, 0, 0, 0)/50985 = [2.00135]
Arow2 := submatrix(A3, 1, 1, 0, 3)/50967 = [9.81027e-5, 1, 9.81027e-5, 9.81027e-5]
Brow2 := submatrix(B3, 1, 1, 0, 0)/50967 = [1.00039]
Arow3 := submatrix(A3, 2, 2, 0, 3)/50969 = [0.000137338, 0.000137338, 1, 0.000137338]
Brow3 := submatrix(B3, 2, 2, 0, 0)/50969 = [1.00055]
Arow4 := submatrix(A3, 3, 3, 0, 3)/50965 = [5.88639e-5, 5.88639e-5, 5.88639e-5, 1]
Brow4 := submatrix(B3, 3, 3, 0, 0)/50965 = [1.00024]
C := [
    0, -Arow1[0, 1], -Arow1[0, 2], -Arow1[0, 3];
    -Arow2[0, 0], 0, -Arow2[0, 2], -Arow2[0, 3];
    -Arow3[0, 0], -Arow3[0, 1], 0, -Arow3[0, 3];
    -Arow4[0, 0], -Arow4[0, 1], -Arow4[0, 2], 0
] = [
    0, -0.000451113, -0.000451113, -0.000451113;
    -9.81027e-5, 0, -9.81027e-5, -9.81027e-5;
    -0.000137338, -0.000137338, 0, -0.000137338;
    -5.88639e-5, -5.88639e-5, -5.88639e-5, 0
]
i := 0, 1 .. 3
C1[i] := sum(|C[i, j]|, j = 0 .. 3)
transpose(C1) = [0.00135334, 0.000294308, 0.000412015, 0.000176592]
C1max := max(C1) = 0.00135334
i := 0, 1 .. 3
C2[i] := sum(|C[j, i]|, j = 0 .. 3)
transpose(C2) = [0.000294305, 0.000647315, 0.00060808, 0.000686554]
C2max := max(C2) = 0.000686554
C3 := sqrt(sum(sum(|C[i, j]|^2, j = 0 .. 3), i = 0 .. 3)) = 0.000840453
q := C1max = 0.00135334
z := (1 - q)/q*ε = 0.737913
