y := [3.902; 2.675; 0.611; -3.256; -3.615]
x := [0.234; 2.034; 3.834; 5.634; 7.434]
dy0 := y[1] - y[0] = -1.227
dy1 := y[2] - y[1] = -2.064
dy2 := y[3] - y[2] = -3.867
dy3 := y[4] - y[3] = -0.359
d2y0 := dy1 - dy0 = -0.837
d2y1 := dy2 - dy1 = -1.803
d2y2 := dy3 - dy2 = 3.508
d3y0 := d2y1 - d2y0 = -0.966
d3y1 := d2y2 - d2y1 = 5.311
d4y0 := d3y1 - d3y0 = 6.277
S1 := dy3 - dy0 = 0.868
E1 := d2y0 + d2y1 + d2y2 = 0.868
S2 := d2y2 - d2y0 = 4.345
E2 := d3y0 + d3y1 = 4.345
S3 := d3y1 - d3y0 = 6.277
E3 := d4y0 = 6.277
h := x[1] - x[0] = 1.8
h := 1.8
x_0 := 0.234
x_n := 7.434
t(x, param) :=
    (x - x_0)/h if param == 0
    (x_n - x)/h if param == 1
N(x) :=
    3.902 - 1.227*t(x, 0) - 0.4185*t(x, 0)*(t(x, 0) - 1) - 0.161*t(x, 0)*(t(x, 0) - 1)*(t(x, 0) - 2) + 0.2615*t(x, 0)*(t(x, 0) - 1)*(t(x, 0) - 2)*(t(x, 0) - 3) if 0.234 ≤ x ≤ 7.434
    -3.615 - 0.359*t(x, 1) + 1.754*t(x, 1)*(t(x, 1) + 1) + 0.8852*t(x, 1)*(t(x, 1) + 1)*(t(x, 1) + 2) + 0.2615*t(x, 1)*(t(x, 1) + 1)*(t(x, 1) + 2)*(t(x, 1) + 3) if x > 7.434
N(1.5) = 2.92028
N(7.5) = -3.77892
S1(x) :=
    -0.6817*x + 4.0615 if 0.234 ≤ x < 2.034
    -1.1467*x + 5.0073 if 2.034 ≤ x < 3.834
    -2.1483*x + 8.8477 if 3.834 ≤ x < 5.634
    -0.1994*x - 2.1323 if x ≥ 5.634
S1(1.5) = 3.03895
S1(7.5) = -3.6278
S2(x) :=
    -0.1292*x^2 - 0.3887*x + 4 if 0.234 ≤ x < 3.834
    0.5114*x^2 - 7.2739*x + 20.5415 if x ≥ 3.834
S2(1.5) = 3.12625
S2(7.5) = -5.2465
x := 0, 0.01 .. 8
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