y := [3.902; 2.675; 0.611; -3.256; -3.615]
x := [0.234; 2.034; 3.834; 5.634; 7.434]
dy0 := y[1] - y[0] = -1.227
dy1 := y[2] - y[1] = -2.064
dy2 := y[3] - y[2] = -3.867
dy3 := y[4] - y[3] = -0.359
d2y0 := dy1 - dy0 = -0.837
d2y1 := dy2 - dy1 = -1.803
d2y2 := dy3 - dy2 = 3.508
d3y0 := d2y1 - d2y0 = -0.966
d3y1 := d2y2 - d2y1 = 5.311
d4y0 := d3y1 - d3y0 = 6.277
S1 := dy3 - dy0 = 0.868
E1 := d2y0 + d2y1 + d2y2 = 0.868
S2 := d2y2 - d2y0 = 4.345
E2 := d3y0 + d3y1 = 4.345
S3 := d3y1 - d3y0 = 6.277
E3 := d4y0 = 6.277
h := x[1] - x[0] = 1.8
t := (1 - x[0])/h = 0.425556
f1 := 1/h*(dy0 + d2y0*(2*t - 1)/2 + d3y0*(3*t^2 - 6*t + 2)/6 + d4y0*(4*t^3 - 18*t^2 + 22*t - 6)/24) = -0.586472
f2 := 1/h^2*(d2y0 + d3y0*(t - 1) + d4y0*(6*t^2 - 18*t + 11)/12) = 0.627588
_______________________________________________________________________________________
a := 1
b := 2
n := 5
h := (b - a)/n = 0.2
x[0] := a = 1
i := 1 .. 5
x[i] := x[i - 1] + h
x = [1; 1.2; 1.4; 1.6; 1.8; 2]
i := 0 .. 4
mid[i] := (x[i] + x[i + 1])/2
f(x) := (1 + x)^2*log(x)^2
mid = [1.1; 1.3; 1.5; 1.7; 1.9]
fmid[i] := f(mid[i])
fmid = [0.00755589; 0.0686805; 0.193801; 0.387148; 0.653487]
I := h*sum(fmid[j], j = 0 .. 4) = 0.262134
